;; 1. the same as run039
;; 2. Description: Sim from run33 + Effect +2yr +800sub
;; x1. Author: user
;; 3. Label:       IRT model
;; 4. Estimation:  FOCE -2LL


$SIZE LTH=200
$PROBLEM IRT model for all visit include time effect BL ON SLOPE
;----------------------------------
$INPUT
ID             ;Patient No
TIME           ;Days after Baseline
ITEM           ;Item indicator 1-33
DV             ;Score of item
EVENT          ;Visit indicator
TIMEM          ;Months after Baseline
DRUGE          ;Drug Effect
DID            ;Indicator for group
EID            ;Indicator for different Effect
;----------------------------------
$DATA PDSIME000.csv IGNORE=@
;----------------------------------
$PRED
;-----Item parameter selection-----
IF(ITEM.EQ.1) THEN
DIS=THETA(1)                            ;I1DIS
DISF1=THETA(2)                           ;I1DISF1
DISF2=DISF1+THETA(3)                      ;I1DISF2
DISF3=DISF2+THETA(4)                      ;I1DISF3
DISF4=DISF3+THETA(5)                      ;I1DISF4
ENDIF
IF(ITEM.EQ.2) THEN
DIS=THETA(6)                            ;I2DIS
DISF1=THETA(7)                           ;I2DISF1
DISF2=DISF1+THETA(8)                      ;I2DISF2
DISF3=DISF2+THETA(9)                      ;I2DISF3
DISF4=DISF3+THETA(10)                     ;I2DISF4
ENDIF
IF(ITEM.EQ.3) THEN
DIS=THETA(11)                            ;I3DIS
DISF1=THETA(12)                           ;I3DISF1
DISF2=DISF1+THETA(13)                      ;I3DISF2
DISF3=DISF2+THETA(14)                      ;I3DISF3
DISF4=DISF3+THETA(15)                      ;I3DISF4
ENDIF
IF(ITEM.EQ.4) THEN
DIS=THETA(16)                            ;I4DIS
DISF1=THETA(17)                           ;I4DISF1
DISF2=DISF1+THETA(18)                      ;I4DISF2
DISF3=DISF2+THETA(19)                      ;I4DISF3
DISF4=DISF3+THETA(20)                      ;I4DISF4
ENDIF
IF(ITEM.EQ.5) THEN
DIS=THETA(21)                            ;I5DIS
DISF1=THETA(22)                           ;I5DISF1
DISF2=DISF1+THETA(23)                      ;I5DISF2
DISF3=DISF2+THETA(24)                      ;I5DISF3
DISF4=DISF3+THETA(25)                      ;I5DISF4
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ENDIF
IF(ITEM.EQ.33) THEN
DIS=THETA(161)                            ;I33DIS
DISF1=THETA(162)                           ;I33DISF1
DISF2=DISF1+THETA(163)                      ;I33DISF2
DISF3=DISF2+THETA(164)                      ;I33DISF3
DISF4=DISF3+THETA(165)                      ;I33DISF4
ENDIF

IF (EVENT .EQ. 1) IOVD=ETA(3)
IF (EVENT .EQ. 2) IOVD=ETA(4)
IF (EVENT .EQ. 3) IOVD=ETA(5)
IF (EVENT .EQ. 4) IOVD=ETA(6)
IF (EVENT .EQ. 5) IOVD=ETA(7)
IF (EVENT .EQ. 6) IOVD=ETA(8)
IF (EVENT .EQ. 7) IOVD=ETA(9)
IF (EVENT .EQ. 8) IOVD=ETA(10)
IF (EVENT .EQ. 9) IOVD=ETA(11)
IF (EVENT .EQ. 10) IOVD=ETA(12)
IF (EVENT .EQ. 11) IOVD=ETA(13)
IF (EVENT .EQ. 12) IOVD=ETA(14)

;-----Hidden variable--------------
DIABL  = ETA(1)
DSLOPE = (THETA(166) + THETA(167)*DIABL)/100+ETA(2)
IF (EVENT .EQ. 0)  DIAB = DIABL
IF (EVENT .NE. 0)  DIAB = DIABL + DSLOPE*(1-DRUGE)*TIME/360 + IOVD

;-----2 parameter logit model------
PL1 = EXP(DIS*DIAB - DISF1)/(1+EXP(DIS*DIAB - DISF1)) ;>=1
PL2 = EXP(DIS*DIAB - DISF2)/(1+EXP(DIS*DIAB - DISF2)) ;>=2
PL3 = EXP(DIS*DIAB - DISF3)/(1+EXP(DIS*DIAB - DISF3)) ;>=3
PL4 = EXP(DIS*DIAB - DISF4)/(1+EXP(DIS*DIAB - DISF4)) ;>=4

P0 = 1 - PL1        ; Probability of Score=0
P1 = PL1 - PL2      ; Probability of Score=1
P2 = PL2 - PL3      ; Probability of Score=2
P3 = PL3 - PL4      ; Probability of Score=3
P4 = PL4            ; Probability of Score=4

IF(DV.EQ.0) P = P0
IF(DV.EQ.1) P = P1
IF(DV.EQ.2) P = P2
IF(DV.EQ.3) P = P3
IF(DV.EQ.4) P = P4

TP = 1E-10
IF(P.LT.TP) P=TP
IF(P.GT.(1-TP)) P=1-TP

Y=-2*LOG(P)

;Simulation of item-level data
PG0 = P0
PG1 = PG0 + P1
PG2 = PG1 + P2
PG3 = PG2 + P3
IF (ICALL.EQ.4) THEN
   CALL RANDOM (2,R)
   DV=0
    IF(R.GE.PG0) DV=1
    IF(R.GE.PG1) DV=2
    IF(R.GE.PG2) DV=3
    IF(R.GE.PG3) DV=4
ENDIF
;----------------------------------
; fixed value of 50 for items in which there was no observed response
$THETA
(0, 0.758,5) FIX ;1.I1DIS
(-30, -0.0776,30) FIX ;2.I1DISF1
(0, 2.75,60) FIX ;3.I1DISF2
(0, 3.22,90) FIX ;4.I1DISF3
(25) FIX ;5.I1DIF4
(0, 1.06,5) FIX ;6.I2DIS
(-30, -2.18,30) FIX ;7.I2DISF1
(0, 3.12,60) FIX ;8.I2DISF2
(0, 2.65,90) FIX ;9.I2DISF3
(0, 3.25,150) FIX ;10.I2DISF4
(0, 1.06,5) FIX ;11.I3DIS
(-30, -0.141,30) FIX ;12.I3DISF1
(0, 1.65,60) FIX ;13.I3DISF2
(0, 2.92,90) FIX ;14.I3DISF3
(0, 2.32,150) FIX ;15.I3DISF4
(0, 0.188,5) FIX ;16.I4DIS
(-30, -1.17,30) FIX ;17.I4DISF1
(0, 1.56,60) FIX ;18.I4DISF2
(0, 2.47,90) FIX ;19.I4DISF3
(0, 4.44,150) FIX ;20.I4DISF4
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(0, 1.32,5) FIX ;111.I23DIS
(-30, -2.45,30) FIX ;112.I23DISF1
(0, 2.97,60) FIX ;113.I23DISF2
(0, 2.61,90) FIX ;114.I23DISF3
(0, 5.42,150) FIX ;115.I23DISF4
(0) FIX ;116.I24DIS
(-30, 0.619,30) FIX ;117.I24DISF1
(0, 1.78,60) FIX ;118.I24DISF2
(0, 1.7,90) FIX ;119.I24DISF3
(0, 3.12,150) FIX ;120.I24DISF4
(0, 0.759,5) FIX ;121.I25DIS
(-30, 1.05,30) FIX ;122.I25DISF1
(0, 2.14,60) FIX ;123.I25DISF2
(0, 2.3,90) FIX ;124.I25DISF3
(25) FIX ;125.I25DIF4
(0, 0.0946,5) FIX ;126.I26DIS
(-30, 0.77,30) FIX ;127.I26DISF1
(0, 2.26,60) FIX ;128.I26DISF2
(0, 3.01,90) FIX ;129.I26DISF3
(25) FIX ;130.I26DIF4
(0, 0.82,5) FIX ;131.I27DIS
(-30, 0.904,30) FIX ;132.I27DISF1
(0, 2.28,60) FIX ;133.I27DISF2
(0, 3.77,90) FIX ;134.I27DISF3
(0, 1.95,150) FIX ;135.I27DISF4
(0) FIX ;136.I28DIS
(-30, 0.33,30) FIX ;137.I28DISF1
(0, 0.617,60) FIX ;138.I28DISF2
(0, 1.36,90) FIX ;139.I28DISF3
(0, 4.63,150) FIX ;140.I28DISF4
(0, 0.789,5) FIX ;141.I29DIS
(-30, 0.883,30) FIX ;142.I29DISF1
(0, 0.933,60) FIX ;143.I29DISF2
(0, 1.87,90) FIX ;144.I29DISF3
(25) FIX ;145.I29DIF4
(0) FIX ;146.I30DIS
(-30, 1.92,30) FIX ;147.I30DISF1
(0, 1.27,60) FIX ;148.I30DISF2
(0, 1.94,90) FIX ;149.I30DISF3
(25) FIX ;150.I30DIF4
(0, 0.39,5) FIX ;151.I31DIS
(-30, 2.23,30) FIX ;152.I31DISF1
(0, 1.19,60) FIX ;153.I31DISF2
(0, 2.69,90) FIX ;154.I31DISF3
(25) FIX ;155.I31DIF4
(0, 0.345,5) FIX ;156.I32DIS
(-30, 2.59,30) FIX ;157.I32DISF1
(0, 1.44,60) FIX ;158.I32DISF2
(0, 2.66,90) FIX ;159.I32DISF3
(25) FIX ;160.I32DIF4
(0, 0.0521,5) FIX ;161.I33DIS
(-30, -0.742,30) FIX ;162.I33DISF1
(0, 0.972,60) FIX ;163.I33DISF2
(0, 0.766,90) FIX ;164.I33DISF3
(0, 1.26,150) FIX ;165.I33DISF4
(0, 26.8,50)  ;166.DSLOPE
(-20, -7.55,0);167.BLONSL

$OMEGA
 1 FIX  ;1 Disability BL
 0.0308 ;2 DSLOPE
$OMEGA BLOCK(1) 0.151 ;3 IOV V1
$OMEGA BLOCK(1) SAME        ;4 IOV V2
$OMEGA BLOCK(1) SAME        ;5 IOV V3
$OMEGA BLOCK(1) SAME        ;6 IOV V4
$OMEGA BLOCK(1) SAME        ;7 IOV V5
$OMEGA BLOCK(1) SAME        ;8 IOV V6
$OMEGA BLOCK(1) SAME        ;9 IOV V7
$OMEGA BLOCK(1) SAME        ;10 IOV V8
$OMEGA BLOCK(1) SAME        ;11 IOV V9
$OMEGA BLOCK(1) SAME        ;12 IOV V10
$OMEGA BLOCK(1) SAME        ;13 IOV V11
$OMEGA BLOCK(1) SAME        ;14 IOV V12
;----------------------------------

;----------------------------------
$SIMULATION (953751) (1478963 UNIFORM) ONLYSIM NOPRED SUBPROBLEM=100
;----------------------------------
$TABLE ID TIME ITEM DV DIAB DRUGE EID
NOPRINT NOAPPEND ONEHEADER FILE=sdtab000
